*HEADING
WITH REACTION LAYERS
*NODE,INPUT=with-reaction-layers-nodes
*Element, type=CPE6,INPUT=with-reaction-layers-elements
*INCLUDE, INPUT=with-reaction-layers-nsets
*INCLUDE, INPUT=with-reaction-layers-nsets
*INCLUDE, INPUT=with-reaction-layers-elsets
*SOLID SECTION, ELSET=Insulation, MATERIAL=Insulation
1.,
*SOLID SECTION, ELSET=CaAl2O4, MATERIAL=CaAl2O4
1.,
*SOLID SECTION, ELSET=Co3O4, MATERIAL=Co3O4
1.,
*SOLID SECTION, ELSET=Ca3Co4O9, MATERIAL=Ca3Co4O9
1.,
*SOLID SECTION, ELSET=CaO, MATERIAL=CaO
1.,
*SOLID SECTION, ELSET=CaSiO3, MATERIAL=CaSiO3
1.,
*SOLID SECTION, ELSET=CMO-cmp, MATERIAL=CMO-comp
1.,
*SOLID SECTION, ELSET=CaMnO3, MATERIAL=CaMnO3
1.,
*INCLUDE, INPUT=material-card
*INITIAL CONDITIONS, TYPE=TEMPERATURE
INITIALTEMPERATURE, 600.
*STEP, NAME=STEP-1
*STATIC
1.0, 1.0, 0.00001
*BOUNDARY
LEFTNODE,1,1
*BOUNDARY
LEFTNODE,2,2
*BOUNDARY
RIGHTNODE,2,2
*TEMPERATURE
ENDTEMPERATURE,100.
*RESTART, WRITE, FREQUENCY=0
*OUTPUT, FIELD, VARIABLE=PRESELECT
*OUTPUT, HISTORY, VARIABLE=PRESELECT
*END STEP
