*HEADING
Ca3Co4O9-CaMnO3-Insulation
*NODE,INPUT=without-reaction-layers-nodes
*ELEMENT, TYPE=CPE6,INPUT=without-reaction-layers-elements
*INCLUDE, INPUT=without-reaction-layers-nsets
*INCLUDE, INPUT=without-reaction-layers-elsets
*SOLID SECTION, ELSET=Ca3Co4O9, MATERIAL=Ca3Co4O9
1.,
*SOLID SECTION, ELSET=CaMnO3, MATERIAL=CaMnO3
1.,
*SOLID SECTION, ELSET=INSULATION, MATERIAL=Insulation
1.,
*INCLUDE, INPUT=material-card
*INITIAL CONDITIONS, TYPE=TEMPERATURE
INITIALTEMPERATURE, 600.
*STEP, NAME=STEP-1
*STATIC
1.0, 1.0, 0.00001
*BOUNDARY
LEFTNODE,1,1
*BOUNDARY
LEFTNODE,2,2
*BOUNDARY
RIGHTNODE,2,2
*TEMPERATURE
ENDTEMPERATURE,100.
*RESTART, WRITE, FREQUENCY=0
*OUTPUT, FIELD, VARIABLE=PRESELECT
*OUTPUT, HISTORY, VARIABLE=PRESELECT
*END STEP
